ORIGIN := 1
Data := READPRN("ex1data2.txt")
n := rows(Data) = 47
X := augment(Data[:, 1], Data[:, 2])
Y := Data[:, 3]
k := 1 .. 2
mu[k] := 1/n*sum(X[i, k], i = 1 .. n)
sigma[k] := sqrt(1/n*sum((X[i, k] - mu[k])^2, i = 1 .. n))
mu = [2000.68; 3.17021]
sigma = [786.203; 0.752843]
i := 1 .. n
Xnorm[i, k] := (X[i, k] - mu[k])/sigma[k]
Xnorm = [
    0.131415, -0.226093;
    -0.509641, -0.226093;
    0.507909, -0.226093;
    -0.743677, -1.55439;
    1.27107, 1.10221;
    -0.0199451, 1.10221;
    -0.593589, -0.226093;
    -0.729686, -0.226093;
    -0.789467, -0.226093;
    -0.644466, -0.226093
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]
Ones[i] := 1
Xvec := augment(Ones, Xnorm)
theta := [89597; 139; -8738]
Xvec = [
    1, 0.131415, -0.226093;
    1, -0.509641, -0.226093;
    1, 0.507909, -0.226093;
    1, -0.743677, -1.55439;
    1, 1.27107, 1.10221;
    1, -0.0199451, 1.10221;
    1, -0.593589, -0.226093;
    1, -0.729686, -0.226093;
    1, -0.789467, -0.226093;
    1, -0.644466, -0.226093
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]
1/(2*n)*transpose(Xvec*theta - Y)*(Xvec*theta - Y) = 3.96063e10
1/(2*n)*sum((Xvec[j, 1]*theta[1] + Xvec[j, 2]*theta[2] + Xvec[j, 3]*theta[3] - Y[j])^2, j = 1 .. n) = 3.96063e10
gv := 0.000001
th := [1; 1; 1]
al := 0.0000005
(transpose(Xvec)*Xvec)^-1*transpose(Xvec)*Y = [340413; 109448; -6578.35]
a := 0.000001
gn := 0.0000001
a + a/2 = 1.5e-6
iterations := 1000
al1 := al + ((gv - al)/2) = 7.5e-7
i1 := 1 .. 3
a - a/2 = 5e-7
th[i1] :=
    for iter ∈ 1 .. iterations
        th[1] ← th[1] - a/n*sum((Xvec[k, 1]*th[1] + Xvec[k, 2]*th[2] + Xvec[k, 3]*th[3] - Y[k])*Xvec[k, 1], k = 1 .. n)
        th[2] ← th[2] - a/n*sum((Xvec[k, 1]*th[1] + Xvec[k, 2]*th[2] + Xvec[k, 3]*th[3] - Y[k])*Xvec[k, 2], k = 1 .. n)
        th[3] ← th[3] - a/n*sum((Xvec[k, 1]*th[1] + Xvec[k, 2]*th[2] + Xvec[k, 3]*th[3] - Y[k])*Xvec[k, 3], k = 1 .. n)
al2 := al1 + ((gv - al1)/2) = 8.75e-7
Xtmp := augment(Ones, X)
theta = [89597; 139; -8738]
th = [735.684; 215.711; 164.667]
theta[1] + theta[2]*1650 + 3*theta[3] = 292733
th[1] + th[2]*1650 + th[3]*3 = 357153
